I_out := 2.5 A
f_s := 100 kHz
T := 1/f_s = 10 μs
V_inmin := 26 V
V_out := 21 V
V_inmax := 50 V
V_D := 0 V
η := 1
N_ps := 1
D_max := V_out/(V_inmin + V_out) = 0.446809
D_min := V_out/(V_inmax + V_out) = 0.295775
# Strøm i transformator
I_ripple := 0.6*V_out*I_out/(V_inmax*D_min) = 2.13 A
# Beregner induktans ud fra ripple strøm
L := V_inmax*D_min/(I_ripple*f_s) = 69.4307 μH
I_ripple26 := V_inmin*D_max/(L*f_s) = 1.67318 A
I_ripple50 := V_inmax*D_min/(L*f_s) = 2.13 A
I_pkavg26 := I_out/(1 - D_max) = 4.51923 A
I_pkavg50 := I_out/(1 - D_min) = 3.55 A
I_pk26 := I_pkavg26 + I_ripple26/2 = 5.35582 A
I_pk50 := I_pkavg50 + I_ripple50/2 = 4.615 A
I_RMSp26 := sqrt(D_max*I_pkavg26^2) = 3.02082 A
I_RMSp50 := sqrt(D_min*I_pkavg50^2) = 1.93067 A
I_RMSs26 := sqrt((1 - D_max)*I_pkavg26^2) = 3.36126 A
I_RMSs50 := sqrt((1 - D_min)*I_pkavg50^2) = 2.97909 A
# Beregner luft-gab i kernen
1/2*L*I_pk26^2 = 0.995804 J*10^-3
A_0 := 63 mm^2
B := 0.25 T
l_g := L*I_pk26^2*μ_0/(B^2*A_0) = 635.613 μm
# Der tages udgangspunkt i en 3f3 kerne.
# lg rundes af til den nærmeste værdi i databladet, og den tilhørende AL-værdi noteres.
l_g := 488 μm
A_L := 160 H*10^-9
L_1 := l_g == L_1*I_pk26^2*μ_0/(B^2*A_0) solve, L_1 → 66.9866219054*mm^2*T^2*μm/(A^2*μ_0) = 53.3063 μH
I_ripple := V_inmin*D_max/(L_1*f_s) = 2.1793 A
N := sqrt(L_1/A_L) = 18.2528
N := 19
L_2 := N == sqrt(L_2/A_L) solve, L_2 → 361*H/6250000 = 57.76 μH
I_ripple := V_inmin*D_max/(L_2*f_s) = 2.01126 A
I_pkavg := I_out/(1 - D_max) = 4.51923 A
I_pk := I_pkavg + I_ripple/2 = 5.52486 A
I_RMSp := sqrt(D_max*I_pkavg^2) = 3.02082 A
I_RMSs := sqrt((1 - D_max)*I_pkavg^2) = 3.36126 A
# Beregning af minimumsværdi for udgangskondensator
V_ripple := 50 mV
C_out := I_out*D_max/(V_ripple*f_s) = 223.404 μF
R_ESR := V_ripple*(1 - D_max)/I_out = 11.0638 Ω*10^-3
# Diode krav
V_break := V_out + V_inmax = 71 V
V_D := 0.8 V
# MOSFET krav
V_L := V_inmax*0 = 0 V
V_ds := ((V_inmax + V_L) + 1*(V_out + V_D))*1.3 = 93.34 V
