V_dmin := 26 V
f_s := 100 kHz
V_dmaks := 100 V
V_omaks := 21 V
V_omin := 15 V
T := 1/f_s = 10 μs
V_r := 0.6 V
D_max := 0.50
V_o21' := V_omaks
V_o' := V_r + V_omin = 15.6 V
# Turns ratio
n := V_dmin/V_o21'*D_max/(1 - D_max) = 1.2381
n := 1
D_P24 := V_o21'*n/(V_dmin + V_o21'*n) = 0.446809
D_15V := V_o'*n/(V_dmaks + V_o'*n) = 0.134948
D_S15 := 1 - D_15V = 0.865052
D_S24 := 1 - D_P24 = 0.553191
# Peak sekundær strøm ved boundary
I15_SCdc := 5 A
I_SCdc := I_SCpk*D_S24/2  # error: This variable is undefined. Check that the label is set correctly.
I_SCdc := 2.5 A
I_15SCpk := I15_SCdc*2/D_S15 = 11.56 A
I_SCpk := I_SCdc*2/D_S24 = 9.03846 A
Δi := I_SCpk  # Når det er DCM
# Induktans det kræves for at rampe op til ISCpk fra 0 ved boundary mode
L := V_o21'*T*D_S24/Δi = 12.8529 μH
L_15 := V_o'*T*D_S15/Δi = 14.9304 μH
# Udgangspunkt i RM8 3F3 kernemateriale
# De skriver også at, kan man ikke læse sig frem til det bruges BMAX=300mT?
ΔB_max := 0.2*T
A_e := 0.63 cm^2
I_e := 0.384 cm
N_s := L*Δi/(ΔB_max*A_e) = 9.21986
N_s := 10
N_p := N_s*n = 10
N15_s := L_15*Δi/(ΔB_max*A_e) = 10.7102
L_p := (N_p/N_s)^2*L = 12.8529 μH
N15_p := N15_s*n = 10.7102
gap := L_p*I_SCpk^2*μ_0/(ΔB_max^2*A_e) = 0.0523599 cm
gap := μ_0*N15_p^2*A_e/L_15 - I_e/μ_c  # error: This variable is undefined. Check that the label is set correctly.
gap := 0.061 cm
# For RM8 med materialet 3F3 fås en air gap på 610um, Al=160nH og ue=78
Lp := gap == Lp*I_SCpk^2*μ_0/(ΔB_max^2*A_e) solve, Lp →  # error: This is a premium feature. To use this and other premium features, please upgrade to a full license using the 'Upgrade' button.
D_P24 := V_o'*n/(V_dmin + V_o'*n) = 0.375
sqrt(Lp/(160 H*10^-9)) =  # error: This variable is undefined. Check that the label is set correctly.
D := N_p/(N_s*V_dmaks)*sqrt(2*52.5 W*L_p*f_s) = 0.11617
