# Beregning af modstandsværdier til spændingsdeler i feedback
V_out := 21 V
V_FB := 2.5 V
I_FB1 := 1 mA
R_FB1 := (V_out - V_FB)/I_FB1 = 18.5 kΩ
R_FB1 := 18.7 kΩ
R_FB2 := V_FB/(R_FB/(R_FB1 + R_FB)) == V_out solve, R_FB → 2.52702702703*kΩ
R_FB21 := V_FB/I_FB1 = 2.5 kΩ
R_FB21 := 2.55 kΩ
R_FB22 := R_FB2 == (R_FB21^-1 + R_FB22^-1)^-1 solve, R_FB22 → 280.5*kΩ
R_FB22 := 280 kΩ
R_FB2 := (R_FB21^-1 + R_FB22^-1)^-1 = 2.52699 kΩ
V_FB := R_FB2/(R_FB1 + R_FB2)*V_out = 2.49996 V
# Beregning af RC komponenter til oscillator
f_osc := 200 kHz
C_T := 200*pF  # Foreslået 100pF til 1000pF
R_T := 1.5/(C_T*f_osc) = 37.5 kΩ  # Foreslået værdi mellem 10k og 200k ifølge datablad
R_T := 33.2 kΩ
f_s := f_osc/2 = 100 kHz
# Beregning af formodstand til MOSFET ud fra charge tid
t_ch := 150 ns
Q_gd := 19 nC
V_DD := 12 V
V_gs := 5 V
R_g := t_ch == Q_gd*R_g/(V_DD - V_gs) solve, R_g → 1050*V*ns/(19*nC) = 55.2632 Ω
R_g := 51.1 Ω
Q_gd := 19 nC
t_ch := Q_gd*R_g/(V_DD - V_gs) = 138.7 ns
# Beregning af current sense modstand og offset netværk
I_ppk := 5.65 A
V_Rcs := 1 V
R_CS := V_Rcs/I_ppk = 0.176991 Ω
# Lavpas filter, for at fjerne spikes fra CS signal
t_r := 100 ns
C_lp := 100*pF
BW := 0.34/t_r = 3.4 MHz
R_lp := BW == 1/(2*π*R_lp*C_lp) solve, R_lp → 0.0004681027738/(pF*MHz) = 468.103 Ω
# Snubber netværk til MOSFET
L_m := 152 H*10^-9
f := 1/(40 ns) = 25 MHz
C_oss := 170*pF
C_trans := f == 1/(2*π*sqrt(L_m*C_trans)) solve, C_trans → 50000/(19*π^2*H*MHz^2) = 266.635 pF
X_Lm := 2*π*L_m*f = 23.8761 Ω
R_snubM := X_Lm = 23.8761 Ω
C_snubM := 2*C_trans = 533.269 pF
# Snubber netværk til diode
C_D := 80*pF
f := 1/(35 ns) = 28.5714 MHz
C_diode := f == 1/(2*π*sqrt(L_m*C_diode)) solve, C_diode → 204.142187437/(H*MHz^2) = 204.142 pF
R_snubD := 2*π*L_m*f = 27.287 Ω
P_snubM := C_snubM*(70 V)^2*f_s = 261.302 mW
C_snubD := 2*C_diode = 408.284 pF
P_snubD := C_snubD*(44 V)^2*f_s = 79.0439 mW
# Output kondensator parasitter
C_out := 56 μF
f_res := 108 kHz
L_ESL := f_res == 1/(2*π*sqrt(C_out*L_cout)) solve, L_cout → 1/(2612736*π^2*kHz^2*μF) = 38.7797 H*10^-9
(L_ESL^-1*4)^-1 = 9.69493 H*10^-9
