# Beregning af duty-cycle ved:
V_d := 26 V
V_out := 21 V
N_p := 10
D_1 := 0.5
V_oion := V_out/0.5 + (0.5 V)*2 = 43 V
N := V_oion/V_d == 2*N*D_1 solve, N → 1.65384615385*V/V = 1.65385
V_d := 100 V
V_out := 15 V
V_oion := V_out/0.5 + (0.5 V)*2 = 31 V
D_2 := V_oion/V_d == 2*N*D solve, D → 0.0937209302326*V/V = 0.0937209
# Duty-cycle ved omsætningsforhold på 1
D := V_out == 2*1*D*V_d solve, D → 3/40 = 0.075
