# Transformator
D := (9.95 mm + 16.9 mm)/2 = 13.425 mm
N := 17
ρ := 1.68*10^-8 Ω*m
O := D*π = 4.21759 cm
l := O*N = 71.699 cm
A := 8.6 mm*3.5 mm/34 = 0.885294 mm^2
d := A == (d/2)^2*π solve, d → [
    sqrt(50000000000000000000)*sqrt(56359573965482941417)*mm/50000000000000000000;
    -sqrt(50000000000000000000)*sqrt(56359573965482941417)*mm/50000000000000000000
] = [1.06169; -1.06169] mm
d := 0.5 mm
A := (d/2)^2*π = 0.19635 mm^2
# Beregning af DC modstand
R_dc := ρ*l/A = 61.3469 Ω*10^-3
# Beregning af AC modstand
f_s := 100 kHz
μ_r := 1.26*10^-6
δ := sqrt(2*ρ/(f_s*2*π*μ_r*μ_0)) = 183.776 mm
δ := 206 μm
Q := d/δ = 2.42718
R_ac := R_ac/R_dc == 400 solve, R_ac → 24.538752*Ω
I_RMS := 3 A
I_RMS^2*R_ac = 220.849 W
