V_out21 := 21 V
V_inmax := 50 V
V_inmin := 25 V
V_out15 := 15 V
N_ps := 1
L := 57.76 μH
f_s := 100 kHz
T := 1/f_s = 1e-5 s
V_D := 0.45 V
D_max21 := (V_out21 + V_D)/(V_inmin + V_out21 + V_D) = 0.461787
D_max15 := (V_out15 + V_D)/(V_inmin + V_out21 + V_D) = 0.332616
# Diode krav - Krav til spænding og strøm samt effekttab, ses både med udgang på 5A og 2.5A
I_out21 := 2.5 A
I_out15 := 5 A
V_break := V_out21 + V_inmax = 71 V
I_D1 := I_out21/(1 - D_max21) = 4.645 A
I_D1 := I_out15/(1 - D_max15) = 7.49194 A
P_D1 := I_out21*V_D = 1.125 W
P_D1 := I_out15*V_D = 2.25 W
# MOSFET krav (21V, 2.5A) - Spændingskrav samt tab med bestemt MOSFET for at give overblik (IRFS4620PbF)
V_ds := (V_inmax + N_ps*(V_out21 + V_D))*1.3 = 92.885 V
R_ds := 113 Ω*10^-3
t_r := 150 ns
t_f := 150 ns
I_ripple21 := V_inmin*D_max21/(L*f_s) = 1.99873 A
I_pk21 := V_out21*I_out21/(V_inmin*D_max21) + I_ripple21/2 = 5.54692 A
I_pkavg21 := I_out21/(1 - D_max21) = 4.645 A
I_RMSp21 := sqrt(D_max21*I_pkavg21^2) = 3.15651 A
I_RMSs21 := sqrt((1 - D_max21)*I_pkavg21^2) = 3.40771 A
P_cond := I_RMSp21^2*R_ds = 1.12588 W
P_sw := 1/2*I_pkavg21*(V_inmax + V_out21)*(t_r + t_f)/T = 4.94692 W
# MOSFET krav (15V, 5A) samme MOSFET
V_ds := (V_inmax + N_ps*(V_out15 + V_D))*1.3 = 85.085 V
R_ds := 77.5 Ω*10^-3
t_r := 22.4 ns
t_f := 14.8 ns
I_pkavg15 := I_out15/(1 - D_max15) = 7.49194 A
I_RMSp15 := sqrt(D_max15*I_pkavg15^2) = 4.32081 A
I_RMSs15 := sqrt((1 - D_max15)*I_pkavg15^2) = 6.12043 A
I_ripple15 := V_inmin*D_max15/(L*f_s) = 1.43965 A
I_pk15 := V_out15*I_out15/(V_inmin*D_max15) + I_ripple15/2 = 9.73924 A
P_cond := I_RMSp15^2*R_ds = 1.44688 W
P_sw := 1/2*I_pk15*V_inmax*(t_r + t_f)/T = 0.905749 W
I_RMSp15 := sqrt((1 - D_max15)*I_pkavg15^2) = 6.12043 A
# Beregning af kernetab i transformator
A_0 := 63 mm^2
N := 19
V_e := 2440 mm^3
# Udregnet B felt
ΔB := L*I_pk21/(N*A_0) = 267.661 T*10^-3
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B := ΔB/2 = 133.83 T*10^-3
# Gå man ind på kurven omkring 50mT ved 100kHz, skærer omkring 15
P_V := 120 kW/m^3
P := P_V*V_e = 292.8 mW
# Dette giver ikke i nærheden af kernetabet vi fandt frem til ved pspice på omkring 350mT.. Kan det skyldes at kurven er for 100grader, eller er det en forkert måde at finde kernetabet på?
# Kobbertab i traansformatoren
# Beregner en omkredsen af spoleformen, ud fra en gennemsnitlig diameter
D := (9.95 mm + 16.9 mm)/2 = 13.425 mm
O := D*π = 4.21759 cm
# Beregner længden af kobbertråden
l := O*N = 80.1342 cm
# Uden lakering har den valgte tråd en kobberdiameter på 0,375mm
d := 0.375 mm
# Ud fra den diameter beregnes trådens tværsnitsareal
A_cu := (d/2)^2*π = 0.110447 mm^2
# Beregning af DC modstand i tråden
ρ := 2.204*10^-8 Ω*m  # Ved 100 grader
R_dc1 := ρ*l/A_cu = 159.91 Ω*10^-3
# Da transformatoren har 3 viklinger i parallel, beregnes den samlede modstand
R_dc := (R_dc1^-1*3)^-1 = 53.3035 Ω*10^-3
I_RMSp := 3.021 A
I_RMSs := 3.361 A
P_cup := I_RMSp21^2*R_dc = 0.531091 W
P_cus := I_RMSs21^2*R_dc = 0.618987 W
# Effektivitet, ved lav inputspænding:
V_in := 26 V
I_in := 2.3 A
V_out := 20.99 V
I_out := 2.57 A
P_in := V_in*I_in = 59.8 W
P_out := V_out*I_out = 53.9443 W
R_load := V_out/I_out = 8.16732 Ω
η := P_out/P_in*100 = 90.2079
P_in - P_out = 5.8557 W
# Effektivitet ved høj inputspænding
V_in := 50 V
I_in := 1.1 A
V_out := 20.99 V
I_out := 2.5 A
P_in := V_in*I_in = 55 W
P_out := V_out*I_out = 52.475 W
R_load := V_out/I_out = 8.396 Ω
η := P_out/P_in*100 = 95.4091
# Tab i MOSFET
I_CSpk := 1 V/(0.167 Ω) = 5.98802 A
R_dson := 90 Ω*10^-3*1.25 = 0.1125 Ω
I_CS := I_CSpk - 2.3 A/2 = 4.83802 A
P_cond := I_CS^2*R_dson = 2.63323 W
1/(2*π*20 Ω*230 μF) = 34.5989 Hz
