f_s := 100 kHz
V_inmax := 100 V
V_outmin := 15 V
P_out := 75 W
D_max := 0.5
V_D := 0.5 V
R_th := 46 K/W
ΔT := 100 K
V_e := 1825 mm^3
A_min := 123 mm^2
# Vindingsforhold:
V_trans := V_outmin/D_max = 30 V
N := V_inmax/V_trans = 3.33333
# Beregning af Delta B-felt:
P_e := ΔT/R_th = 2.17391 W
P_e := P_e/2 = 1.08696 W
P_V := P_e/V_e = 595.593 kW/m^3
ΔB := 190 T*10^-3  # Delta-B aflæses til ca 190mT, i tabskurven
# Beregning af antal viklinger
N_p := V_inmax*D_max/(2*ΔB*A_min*f_s) = 10.6975
N_s := N_p/N = 3.20924
N_s := 4  # Rundes op til 4
# Ny Np beregnes:
N_p := N_s*N = 13.3333
N_p := 13  # Rundes ned til 13
# Den korrigede B bliver:
B := V_inmax*D_max/(N_p*A_min*f_s) = 312.695 T*10^-3
