I_o := 2.5 A
f_s := 100 kHz
T := 1/f_s = 10 μs
V_in := 26 V
L := 100 μH
I_pk := V_in*T/2/L = 1.3 A
A_0 := 63 mm^2
B := 0.2 T
l_g := L*I_o^2*μ_0/(B^2*A_0) = 311.666 μm
# Der tages udgangspunkt i en 3f3 kerne.
# lg rundes op til den nærmeste værdi i databladet, og den tilhørende AL-værdi noteres.
l_g := 270 μm
A_L := 315 H*10^-9
L_1 := l_g == L_1*I_o^2*μ_0/(B^2*A_0) solve, L_1 → 108.864*mm^2*T^2*μm/(A^2*μ_0) = 86.6312 μH
I_pk := V_in*T/2/L_1 = 1.50061 A
N := sqrt(L_1/A_L) = 16.5837
